*Heading
**This is the kirisoro.inp file for the papaer
**"Untethered Kirigami Soft Robots with Programmable Locomotion", Applied Physics Reviews(2023)。
************************************************************************
** this input file should be implemented with UEL subroutine uMag.for
**    1. user needs to define applied magnetic field:
**       unit directional vector and magnitude.
**    2. user needs to define material's mechanical properties:
**       shear modulus (Gshear) and bulk modulus (Kbulk) for MAGNETIC DISKS and ELASTOMER BASE.
**    3. user needs to define kirigami soft robot's magnetization pattern:
**        each magnetic disks can be specified a magentization along x,y,z directions, respectively.
**    4. user needs to define kirigami soft robot's magnetic moment density:
**       components along x,y,z directions.
**
**	UNITS:	Length - meters, Force - Newtons,
**		Stress - Newton/meter^2 = Pa, Mass - kilograms,
**		Density - kg/meter^3, Energy - Joules
**
**  model description:
**  A single-module kirigami soft robot with Y-axis symmetric magnetization pattern
**  and applied magnetic field along (0,1,0) with a  magnitude of 15 mT.
**
**  Implemented in Abaqus 2021
**  The uMag.for is created by Zhao et al.
**  Please refer to papers "Printing ferromagnetic domains for untethered fast-transforming soft materials, Nature(2018)"
** and "Mechanics of hard-magnetic soft materials, JMPS(2019)".
************************************************************************
*Parameter
**
** final magnitude of the applied magnetic field (Tesla)
magFieldMag = 0.015
**
** applied magnetic field unit vector
magFieldVecX = 0.0
magFieldVecY = 1.0
magFieldVecZ = 0.0
**
**	MATERIAL PARAMETERS
**
**A single-module YS kirigami soft robots
**
** initial magnetic moment density (A/m)
Mx1 = 110.0e3
Mx2 = -110.0e3
Mx3 = -110.0e3
Mx4 = 110.0e3
MxS = 0.0e3
My = 0.0
Mz = 0.0
**
** initial shear modulus (Pa)
Gshear = 200.e3
GshearS = 100.e3
**
** bulk modulus (Pa)
Kbulk = 100.0*Gshear
KbulkS = 100.0*GshearS
**
** number of body integration points
nInt = 8
**
** number of real material properties
nProps = 5
**
** number of integer material properties
nJProps = 1
**
************************************************************************
**		MODEL DEFINITION
************************************************************************
**
*Node, nset=Nall
      1, -0.00249999994, 0.000500000024,           0.
      2, -0.00324226986, -0.0014755138,           0.
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*User Element,Nodes=8,Type=U3,Iproperties=<nJProps>,Properties=<nProps>,Coordinates=3,Unsymm
1,2,3
*Element, type=U3
 1, 1271,  189, 1256, 3538,  185,    1,  188, 1253
 2, 3538, 1256, 1257, 3536, 1253,  188,  187, 1254
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*Nset, nset=HMSM1
   23,   26,   29,   31,  163,  166
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*Elset, elset=HMSM1, generate
 2185,  2460,     1
*Nset, nset=HMSM2
  117,  118,  121,  122,  172,  173
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*Elset, elset=HMSM2, generate
 3049,  3360,     1
*Nset, nset=HMSM3
    1,    2,    5,    6,    9,   11
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*Elset, elset=HMSM3, generate
 2761,  3048,     1
*Nset, nset=HMSM4
   13,   16,   17,   21,  148,  149
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*Elset, elset=HMSM4, generate
 2461,  2760,     1
*Nset, nset=SIL
    1,    2,    3,    4,    5,    6
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*Elset, elset=SIL, generate
    1,  2184,     1
*Nset, nset=BC1
  49,  50, 101, 102, 374, 375, 376, 724, 725, 726
*Elset, elset=BC1
  253,  254,  255,  256,  281,  282,  283,  284, 1149, 1150, 1151, 1152, 1309, 1310, 1311, 1312
*Nset, nset=BC2
 113, 116, 136, 137, 760, 761, 762, 881, 882, 883
*Elset, elset=BC2
 1165, 1166, 1167, 1168, 1261, 1262, 1263, 1264, 1345, 1346, 1347, 1348, 1361, 1362, 1363, 1364
********************************************************************************************************
** Make the Dummy Mesh for Visualization
**
*Element, type=C3D8, elset=ElDummy
4001, 1271, 189, 1256, 3538, 185, 1, 188, 1253
4002, 3538, 1256, 1257, 3536, 1253, 188, 187, 1254
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**
************************************************************************
**			MATERIAL DEFINITION
************************************************************************
**
** Material properties for the real material
**
*uel property,elset=HMSM1
<Gshear>,<Kbulk>,<Mx1>,<My>,<Mz>,<nInt>
*uel property,elset=HMSM2
<Gshear>,<Kbulk>,<Mx2>,<My>,<Mz>,<nInt>
*uel property,elset=HMSM3
<Gshear>,<Kbulk>,<Mx3>,<My>,<Mz>,<nInt>
*uel property,elset=HMSM4
<Gshear>,<Kbulk>,<Mx4>,<My>,<Mz>,<nInt>
*uel property,elset=SIL
<GshearS>,<KbulkS>,<MxS>,<My>,<Mz>,<nInt>
**
*Material, name=Material-1
*Elastic
1.e-20
*Conductivity
1.0
*Density
1.0
**
** Dummy mesh material properties
**
*Solid section, elset=ElDummy, material=Material-2
**
*Material, name=Material-2
*Elastic
1.e-20
*Density
2500.0
**
************************************************************************
** INTERACTION PROPERTIES
************************************************************************
**
*Surface Interaction, name=IntProp-1
1.,
*Friction
 0.3,
*Surface Behavior, pressure-overclosure=LINEAR
1e+08,
**
** INTERACTIONS
**
** Interaction: Int-1
*Contact, op=NEW
*Contact Inclusions, ALL EXTERIOR
*Contact Property Assignment
 ,  , IntProp-1
**
************************************************************************
**			INITIAL CONDITIONS
************************************************************************
**
**
*Initial conditions, type=field, variable=1
Nall,<magFieldVecX>
*Initial conditions, type=field, variable=2
Nall,<magFieldVecY>
*Initial conditions, type=field, variable=3
Nall,<magFieldVecZ>
*Initial conditions, type=field, variable=4
Nall,<magFieldMag>
**
************************************************************************
**			AMPLITUDE DEFINITION
************************************************************************
*Amplitude, name=magFieldMagAmp
0.0,0.0,1.,<magFieldMag>
**
************************************************************************
**			STEP DEFINITION
************************************************************************
*Step, Name=Deform, nlgeom=yes, inc=100000
*Static
0.02,1.,1.e-6,1.
*Controls, Parameters=Time Incrementation
,,,,,,,10,,,,,,
**
************************************************************************
**			BOUNDARY CONDITIONS
************************************************************************
** BOUNDARY CONDITIONS
**
** Name: BC-1 Type: Symmetry/Antisymmetry/Encastre
*Boundary
BC1, XASYMM
** Name: BC-2 Type: Symmetry/Antisymmetry/Encastre
*Boundary
BC2, YASYMM
**
************************************************************************
**			PREDEFINED FIELD
************************************************************************
**
*Field, variable=1
Nall,<magFieldVecX>
*Field, variable=2
Nall,<magFieldVecY>
*Field, variable=3
Nall,<magFieldVecZ>
*Field, variable=4, amplitude=magFieldMagAmp
Nall,1.0
**
************************************************************************
**			OUTPUT
************************************************************************
*Output, field
*node output, nset=Nall
u,RF
*element output, elset=ElDummy
le,ne,SDV
*Element Output, elset=ElDummy, Position=Integration Points
COORD, IVOL
**
*Output, history, variable=PRESELECT
*End Step
